// COMSOL Multiphysics 6.2.0.339 model "3D rmm axial flux basic prototype v1.mph"
// Outline of the model tree

Pairs
  ap2: Identity "Identity Boundary Pair 2" | source: boundaries 12-17; destination: boundaries 19-22, 37, 40

Common definitions
  rot1: RotatingDomain on domains 3-6 | rotationType = rotationalVelocity; angularVelocity = pi/4

Geometry
  geom1 "Geometry 1" (3D, length unit mm)
    cyl1: Cylinder | r = 50; h = 8
    blk1: Block | pos = {-30, 0, 9}; base = center; size = {6, 6, 4}
    blk4: Block | pos = {30, 0, 9}; base = center; size = {6, 6, 4}
    dif3: Difference | input = cyl1; input2 = blk1, blk4; keepsubtract = on
    cyl2: Cylinder | pos = {0, 0, -5}; r = 60; h = 25
    uni1: Union | input = blk1, blk4, cyl2, dif3
    blk2: Block | base = center; size = {200, 200, 200}
    dif1: Difference | input = blk2; input2 = uni1; keepsubtract = on
    blk3: Block | pos = {-75, 0, 0}; base = center; size = {20, 100, 80}
    dif2: Difference | input = dif1; input2 = blk3; keepsubtract = on
    uni2: Union | input = blk3, dif2
    fin: Finalize "Form Assembly" | action = assembly

Materials
  mat1: Common "N42 (Sintered NdFeB)" on domains 5, 6
    def "Basic"
      electricconductivity = 1/1.4[uohm*m]
      relpermittivity = 1
    RemanentFluxDensity
      murec = 1.05
      normBr = 1.31[T]
  mat2: Common "Soft Iron (Without Losses)" on domains 2, 4
    def "Basic"
      electricconductivity = 0[S/m]
      relpermittivity = 1
      relpermeability = 3000
    BHCurve
      normB = BH(normHin)
      normH = BH_inv(normBin)
      Wpm = BH_prim(normHin)
      normHin = sqrt(H1^2+H2^2+H3^2+eps)
      DESCR_PREFIX:normHin = Magnetic field norm
      normBin = sqrt(B1^2+B2^2+B3^2+eps)
      DESCR_PREFIX:normBin = Magnetic flux density norm
      BH: Interpolation
        table = 
          {0, 0}
          {663.146, 1}
          {1067.5, 1.1}
          {1705.23, 1.2}
          {2463.11, 1.3}
          {3841.67, 1.4}
          {5425.74, 1.5}
          {7957.75, 1.6}
          {12298.3, 1.7}
          {20462.8, 1.8}
          {32169.6, 1.9}
          {61213.4, 2}
          {111408, 2.1}
          {188487.757, 2.2}
          {267930.364, 2.3}
          {347507.836, 2.4}
        extrap = linear
        fununit = T
        argunit = A/m
        defineinv = on
        defineprimfun = on
    EffectiveBHCurve
      normBeff = BHeff(normHeffin)
      normHeff = BHeff_inv(normBeffin)
      normHeffin = sqrt(realdot(H1,H1)+realdot(H2,H2)+realdot(H3,H3)+eps)
      DESCR_PREFIX:normHeffin = Effective magnetic field norm
      normBeffin = sqrt(realdot(B1,B1)+realdot(B2,B2)+realdot(B3,B3)+eps)
      DESCR_PREFIX:normBeffin = Effective magnetic flux density norm
      BHeff: Interpolation
        table = 
          {0, 0}
          {663.146, 1.00000005169}
          {1067.5, 1.49364951241}
          {1705.23, 1.94153284613}
          {2463.11, 2.25776566937}
          {3841.67, 2.60998064243}
          {5425.74, 2.86644520908}
          {7957.75, 3.14414380972}
          {12298.3, 3.44853805165}
          {20462.8, 3.78167119737}
          {32169.6, 4.05834559011}
          {61213.4, 4.42064655295}
          {111408, 4.72127408955}
          {188487.757, 4.97214814072}
          {267930.364, 5.14551086086}
          {347507.836, 5.24551086143}
        extrap = linear
        fununit = T
        argunit = A/m
        defineinv = on
  mat3: Common "Air" on domains 1, 3
    def "Basic"
      thermalexpansioncoefficient = alpha_p(pA,T)
      molarmass = 0.02897[kg/mol]
      bulkviscosity = muB(T)
      relpermeability = 1
      relpermittivity = 1
      dynamicviscosity = eta(T)
      ratioofspecificheat = 1.4
      electricconductivity = 1[S/m]
      heatcapacity = Cp(T)
      density = rho(pA,T)
      thermalconductivity = k(T)
      soundspeed = cs(T)
      eta: Piecewise | arg = T; pieces = {200.0, 1600.0, -8.38278E-7+8.35717342E-8*T^1-7.69429583E-11*T^2+4.6437266E-14*T^3-1.06585607E-17*T^4}; argunit = K; fununit = Pa*s
      Cp: Piecewise | arg = T; pieces = {200.0, 1600.0, 1047.63657-0.372589265*T^1+9.45304214E-4*T^2-6.02409443E-7*T^3+1.2858961E-10*T^4}; argunit = K; fununit = J/(kg*K)
      rho: Analytic | expr = pA*0.02897/R_const[K*mol/J]/T; args = {pA, T}; fununit = kg/m^3; argunit = {Pa, K}
      k: Piecewise | arg = T; pieces = {200.0, 1600.0, -0.00227583562+1.15480022E-4*T^1-7.90252856E-8*T^2+4.11702505E-11*T^3-7.43864331E-15*T^4}; argunit = K; fununit = W/(m*K)
      cs: Analytic | expr = sqrt(1.4*R_const[K*mol/J]/0.02897*T); args = T; fununit = m/s; argunit = K
      an1: Analytic | funcname = alpha_p; expr = -1/rho(pA,T)*d(rho(pA,T),T); args = {pA, T}; fununit = 1/K; argunit = {Pa, K}
      an2: Analytic "Analytic 2a" | funcname = muB; expr = 0.6*eta(T); args = T; fununit = Pa*s; argunit = K
    RefractiveIndex
      n = 1
      ki = 0
    NonlinearModel
      BA = def.gamma-1
    idealGas
      Rs = R_const/Mn
      heatcapacity = Cp(T)
      ratioofspecificheat = 1.4
      molarmass = 0.02897[kg/mol]
      Cp: Piecewise | arg = T; pieces = {200.0, 1600.0, 1047.63657-0.372589265*T^1+9.45304214E-4*T^2-6.02409443E-7*T^3+1.2858961E-10*T^4}; argunit = K; fununit = J/(kg*K)
  mat4: Common "Soft Iron (With Losses)" (disabled) on domains 2, 4
    def "Basic"
      electricconductivity = 1.12e7[S/m]
      relpermittivity = 1
      relpermeability = 1000
    BHCurve
      normB = BH(normHin)
      normH = BH_inv(normBin)
      Wpm = BH_prim(normHin)
      normHin = sqrt(H1^2+H2^2+H3^2+eps)
      DESCR_PREFIX:normHin = Magnetic field norm
      normBin = sqrt(B1^2+B2^2+B3^2+eps)
      DESCR_PREFIX:normBin = Magnetic flux density norm
      BH: Interpolation
        table = 
          {0, 0}
          {663.146, 1}
          {1067.5, 1.1}
          {1705.23, 1.2}
          {2463.11, 1.3}
          {3841.67, 1.4}
          {5425.74, 1.5}
          {7957.75, 1.6}
          {12298.3, 1.7}
          {20462.8, 1.8}
          {32169.6, 1.9}
          {61213.4, 2}
          {111408, 2.1}
          {188487.757, 2.2}
          {267930.364, 2.3}
          {347507.836, 2.4}
        extrap = linear
        fununit = T
        argunit = A/m
        defineinv = on
        defineprimfun = on
    EffectiveBHCurve
      normBeff = BHeff(normHeffin)
      normHeff = BHeff_inv(normBeffin)
      normHeffin = sqrt(realdot(H1,H1)+realdot(H2,H2)+realdot(H3,H3)+eps)
      DESCR_PREFIX:normHeffin = Effective magnetic field norm
      normBeffin = sqrt(realdot(B1,B1)+realdot(B2,B2)+realdot(B3,B3)+eps)
      DESCR_PREFIX:normBeffin = Effective magnetic flux density norm
      BHeff: Interpolation
        table = 
          {0, 0}
          {663.146, 1.00000005169}
          {1067.5, 1.49364951241}
          {1705.23, 1.94153284613}
          {2463.11, 2.25776566937}
          {3841.67, 2.60998064243}
          {5425.74, 2.86644520908}
          {7957.75, 3.14414380972}
          {12298.3, 3.44853805165}
          {20462.8, 3.78167119737}
          {32169.6, 4.05834559011}
          {61213.4, 4.42064655295}
          {111408, 4.72127408955}
          {188487.757, 4.97214814072}
          {267930.364, 5.14551086086}
          {347507.836, 5.24551086143}
        extrap = linear
        fununit = T
        argunit = A/m
        defineinv = on

Physics
  rmm: RotatingMachineryMagnetic on all domains
    dependent variable A = {Ax, Ay, Az}
    etf1: ElectricFieldTransformation (default)
    al1: AmperesLaw "Ampère's Law 1" (default) | materialType = solid
    mxb1: MixedFormulationBoundary (default)
    mi1: MagneticInsulation (default)
    init1: init "Initial Values 1" (default)
    dcont1: Continuity (default)
    ncmag1: NonconductingMagnet on domains 5, 6 | DirectionMethod = SpecifyNorthSouthBoudaries
      north1: North on boundaries 32, 43
      south1: South on boundaries 29, 46
    cmag1: ConductingMagnet (disabled) on domains 5 | DirectionMethod = UserDefined; directionInput = {0, 0, 1}
    mfc1: MagneticFluxConservation on domains 1-4
    al2: AmperesLaw "Ampère's Law 2" (disabled) on domains 5
      ConstitutiveRelationBH = RemanentFluxDensity
      e_crel_BH_RemanentFluxDensity = {0, 0, 1}
    gfa1: GaugeFixingA "Gauge Fixing for A-field 1" (disabled) on all domains | SetPointConstraint = 1
    zsp1: ZeroMagneticScalarPotential on points 2

Mesh
  mesh1 "Mesh 1"
    size: MeshSizeDefault | hauto = 3
    bl1: BndLayer "Boundary Layers 1" (disabled) on domains 4, 5
      blp: BndLayerProp "Boundary Layer Properties" on boundaries 23-36, 38, 39, 46
    ftet1: FreeTet "Free Tetrahedral 1" on remaining entities
      size1: Size on entire geometry | hauto = 3

Studies
  std1 "Study 1"
    stat: Stationary
    time: Transient "Time Dependent" | tlist = range(0,0.1,1)

Solver configurations
  sol1 "Solution 1" (study std1)
    v1: Variables "Dependent Variables 1"
    s1: Stationary "Stationary Solver 1"
      fc1: FullyCoupled | linsolver = i1
      i1: Iterative | prefuntype = right; nlinnormuse = on
        mg1: Multigrid
    su1: StoreSolution "Solution Store 1"
    v2: Variables "Dependent Variables 2" | initmethod = sol; notsolmethod = sol
    t1: Time "Time-Dependent Solver 1"
      tlist = range(0,0.1,1)
      tout = tstepsclosest
      tstepsbdf = strict
      estrat = exclude
      fc1: FullyCoupled | linsolver = dDef
      dDef: Direct
  sol2 "Solution Store 1" (study std1)

Datasets
  dset1: Solution | solution = sol1
  dset2: Solution | solution = sol2

Plots
  pg1: PlotGroup3D "Magnetic Flux Density Norm (rmm)" | data = dset1
    mslc1: Multislice
      expr = rmm.normB
      multiplanexmethod = coord
      xcoord = rmm.CPx
      multiplaneymethod = coord
      ycoord = rmm.CPy
      multiplanezmethod = coord
      zcoord = rmm.CPz
    strmsl1: StreamlineMultislice
      expr = {rmm.Bx, rmm.By, rmm.Bz}
      multiplanexmethod = coord
      xcoord = rmm.CPx
      multiplaneymethod = coord
      ycoord = rmm.CPy
      multiplanezmethod = coord
      zcoord = rmm.CPz
      udist = 0.02
      col1: Color "Color Expression 1" | expr = rmm.normB
      filt1: Filter | expr = !isScalingSystemDomain
  pg2: PlotGroup3D "3D Plot Group 2" | data = dset1
    mesh1: Mesh
      sel1: MeshSelection "Selection 1" on domains 4-6