// COMSOL Multiphysics 6.2.0.339 model "Single rotor stator rotating and moving coil physics applied remesh iron rotor stationary.mph"
// Outline of the model tree

Parameters
  f = 0.20 [Hz]
  e = 10 [mm]
  rad = 35 [mm]
  t = 0[s]  // Set the time t to zero for the stationary study

Variables
  var1 "Variables 1"
    u = e*sin(2*pi*f*t)
    w = e*cos(2*pi*f*t) - e

Pairs
  ap1: Identity "Identity Boundary Pair 1" | source: boundaries 17-20, 25, 34; destination: boundaries 39-42, 63, 66

Common definitions
  pres1: PrescribedDeformation on domains 3-5 | prescribedDeformation = {u, w, 0}
  rot1: RotatingDomain on domains 6-9 | rotationType = rotationalVelocity; angularVelocity = pi/4
  free1: DeformingDomain on domains 2
  disp1: PrescribedMeshDisplacement on boundaries 9-12, 26, 36 | prescribedMeshDisplacement = {u, w, 0}
  fix1: FixedBoundary (disabled) on boundaries 5-8, 24, 37

Geometry
  geom1 "Geometry 1" (3D, length unit mm)
    cyl1: Cylinder "rotor" | pos = {0, 0, 3}; r = 20; h = 6
    cyl2: Cylinder "rotor-air" | pos = {0, 0, -2}; r = 20+10+4; h = 6+4+4
    cyl8: Cylinder "magnet 1" (disabled) | pos = {0, 0, 1}; r = 6; h = 2
    blk1: Block | pos = {-2.5, -12.5, 1}; size = {5, 5, 3}
    blk2: Block | pos = {-2.5, 7.5, 1}; size = {5, 5, 3}
    dif6: Difference | input = cyl1; input2 = blk1, blk2; keepsubtract = on
    uni3: Union | input = blk1, blk2, dif6
    dif1: Difference "rotor-air-wrapper" | input = cyl2; input2 = uni3; keepsubtract = on
    cyl3: Cylinder "stator" | pos = {0, e, -16}; r = rad; h = 6
    cyl4: Cylinder "stator-air" | pos = {0, e, -16-2-5}; r = rad+4; h = 6+4+5
    cyl7: Cylinder "stator-hole" | pos = {0, e, -16}; r = rad-16; h = 6
    dif5: Difference "stator-hole-cut" | input = cyl3; input2 = cyl7
    dif2: Difference "stator-air-wrapper" | input = cyl4; input2 = dif5; keepsubtract = on
    cyl5: Cylinder "deforming-air" | pos = {0, e, -16-2-20}; r = rad+4+80; h = 6+4+3+20
    dif3: Difference "deforming-air-wrapper" | input = cyl5; input2 = dif5, dif2; keepsubtract = on
    cyl6: Cylinder "air" | pos = {0, 0, -38}; r = 200; h = 100
    dif4: Difference "deforming-air-wrapper 1" | input = cyl6; input2 = uni3, dif1, dif2, dif3, dif5; keepsubtract = on
    uni2: Union | input = uni3, dif1
    uni1: Union | input = dif5, dif2, dif3, dif4
    wp1: WorkPlane
      planetype = vertices
      quickplane = yz
      vertex1 = uni1(1) points 30
      vertex2 = uni1(1) points 26
      vertex3 = uni1(1) points 25
      unite = on
    pard1: PartitionDomains | domain = uni1(1) domains 4; workplane = wp1
    fin: Finalize "Form Assembly" | action = assembly

Materials
  mat2: Common "Air" on domains 1-3, 6, 7
    def "Basic"
      thermalexpansioncoefficient = alpha_p(pA,T)
      molarmass = 0.02897[kg/mol]
      bulkviscosity = muB(T)
      relpermeability = 1
      relpermittivity = 1
      dynamicviscosity = eta(T)
      ratioofspecificheat = 1.4
      electricconductivity = 10[S/m]
      heatcapacity = Cp(T)
      density = rho(pA,T)
      thermalconductivity = k(T)
      soundspeed = cs(T)
      eta: Piecewise | arg = T; pieces = {200.0, 1600.0, -8.38278E-7+8.35717342E-8*T^1-7.69429583E-11*T^2+4.6437266E-14*T^3-1.06585607E-17*T^4}; argunit = K; fununit = Pa*s
      Cp: Piecewise | arg = T; pieces = {200.0, 1600.0, 1047.63657-0.372589265*T^1+9.45304214E-4*T^2-6.02409443E-7*T^3+1.2858961E-10*T^4}; argunit = K; fununit = J/(kg*K)
      rho: Analytic | expr = pA*0.02897/R_const[K*mol/J]/T; args = {pA, T}; fununit = kg/m^3; argunit = {Pa, K}
      k: Piecewise | arg = T; pieces = {200.0, 1600.0, -0.00227583562+1.15480022E-4*T^1-7.90252856E-8*T^2+4.11702505E-11*T^3-7.43864331E-15*T^4}; argunit = K; fununit = W/(m*K)
      cs: Analytic | expr = sqrt(1.4*R_const[K*mol/J]/0.02897*T); args = T; fununit = m/s; argunit = K
      an1: Analytic | funcname = alpha_p; expr = -1/rho(pA,T)*d(rho(pA,T),T); args = {pA, T}; fununit = 1/K; argunit = {Pa, K}
      an2: Analytic "Analytic 2a" | funcname = muB; expr = 0.6*eta(T); args = T; fununit = Pa*s; argunit = K
    RefractiveIndex
      n = 1
      ki = 0
    NonlinearModel
      BA = def.gamma-1
    idealGas
      Rs = R_const/Mn
      heatcapacity = Cp(T)
      ratioofspecificheat = 1.4
      molarmass = 0.02897[kg/mol]
      Cp: Piecewise | arg = T; pieces = {200.0, 1600.0, 1047.63657-0.372589265*T^1+9.45304214E-4*T^2-6.02409443E-7*T^3+1.2858961E-10*T^4}; argunit = K; fununit = J/(kg*K)
  mat1: Common "Copper" on domains 4, 5
    def "Basic"
      relpermeability = 1
      electricconductivity = 5.998e7[S/m]
      thermalexpansioncoefficient = 17e-6[1/K]
      heatcapacity = 385[J/(kg*K)]
      relpermittivity = 1
      density = 8960[kg/m^3]
      thermalconductivity = 400[W/(m*K)]
    Enu "Young's modulus and Poisson's ratio"
      E = 110[GPa]
      nu = 0.35
    linzRes "Linearized resistivity"
      rho0 = 1.72e-8[ohm*m]
      alpha = 0.0039[1/K]
      Tref = 298[K]
  mat3: Common "N50 (Sintered NdFeB)" on domains 8, 9
    def "Basic"
      electricconductivity = 1/1.4[uohm*m]
      relpermittivity = 1
    RemanentFluxDensity
      murec = 1.05
      normBr = 1.41[T]
  mat4: Common "Soft Iron (Without Losses)" on domains 7
    def "Basic"
      electricconductivity = 0[S/m]
      relpermittivity = 1
      relpermeability = 1000
    BHCurve
      normB = BH(normHin)
      normH = BH_inv(normBin)
      Wpm = BH_prim(normHin)
      normHin = sqrt(H1^2+H2^2+H3^2+eps)
      DESCR_PREFIX:normHin = Magnetic field norm
      normBin = sqrt(B1^2+B2^2+B3^2+eps)
      DESCR_PREFIX:normBin = Magnetic flux density norm
      BH: Interpolation
        table = 
          {0, 0}
          {663.146, 1}
          {1067.5, 1.1}
          {1705.23, 1.2}
          {2463.11, 1.3}
          {3841.67, 1.4}
          {5425.74, 1.5}
          {7957.75, 1.6}
          {12298.3, 1.7}
          {20462.8, 1.8}
          {32169.6, 1.9}
          {61213.4, 2}
          {111408, 2.1}
          {188487.757, 2.2}
          {267930.364, 2.3}
          {347507.836, 2.4}
        extrap = linear
        fununit = T
        argunit = A/m
        defineinv = on
        defineprimfun = on
    EffectiveBHCurve
      normBeff = BHeff(normHeffin)
      normHeff = BHeff_inv(normBeffin)
      normHeffin = sqrt(realdot(H1,H1)+realdot(H2,H2)+realdot(H3,H3)+eps)
      DESCR_PREFIX:normHeffin = Effective magnetic field norm
      normBeffin = sqrt(realdot(B1,B1)+realdot(B2,B2)+realdot(B3,B3)+eps)
      DESCR_PREFIX:normBeffin = Effective magnetic flux density norm
      BHeff: Interpolation
        table = 
          {0, 0}
          {663.146, 1.00000005169}
          {1067.5, 1.49364951241}
          {1705.23, 1.94153284613}
          {2463.11, 2.25776566937}
          {3841.67, 2.60998064243}
          {5425.74, 2.86644520908}
          {7957.75, 3.14414380972}
          {12298.3, 3.44853805165}
          {20462.8, 3.78167119737}
          {32169.6, 4.05834559011}
          {61213.4, 4.42064655295}
          {111408, 4.72127408955}
          {188487.757, 4.97214814072}
          {267930.364, 5.14551086086}
          {347507.836, 5.24551086143}
        extrap = linear
        fununit = T
        argunit = A/m
        defineinv = on

Physics
  mf: InductionCurrents "Magnetic Fields" (disabled) on all domains
    dependent variable A = {Ax, Ay, Az}
    fsp1: FreeSpace (default)
    mi1: MagneticInsulation (default)
    init1: init "Initial Values 1" (default)
    mag1: Magnet on domains 7-9 | DirectionMethod = UserDefined
    coil1: Coil on domains 4, 5 | CoilExcitation = Voltage; VCoil = 0.001[V]
      ccc1: CoilCurrentCalculation "Geometry Analysis 1" (default)
        ct1: CoilTerminal "Input 1" on boundaries 32
    gfa1: GaugeFixingA "Gauge Fixing for A-field 1" on all domains
    cont1: Continuity on all boundaries | pairs = ap1
  rmm: RotatingMachineryMagnetic on all domains
    dependent variable A2 = {A2x, A2y, A2z}
    ShapeProperty.order_magneticvectorpotential = 2
    ShapeProperty.order_magneticscalarpotential = 2
    etf1: ElectricFieldTransformation (default)
    al1: AmperesLaw "Ampère's Law 1" (default)
      loss1: LossCalculation (disabled) on all domains
    mxb1: MixedFormulationBoundary (default)
    mi1: MagneticInsulation (default)
    init1: init "Initial Values 1" (default)
    dcont1: Continuity (default)
    mfc1: MagneticFluxConservation on domains 1, 6, 7
      loss1: LossCalculation (disabled) on all domains
    ncmag1: NonconductingMagnet on domains 8, 9
      DirectionMethod = SpecifyNorthSouthBoudaries
      directionInput = {-1, 0, 0}
      north1: North on boundaries 52, 57
      south1: South on boundaries 49, 60
    cmag1: ConductingMagnet (disabled) on domains 7-9 | DirectionMethod = UserDefined
    coil1: Coil on domains 4, 5
      ConductorModel = Single
      CoilExcitation = Voltage
      CoilType = Circular
      VCoil = 0.000135[V]
      N = 1
      wireProperties = Conductivity
      ccc1: CoilCurrentCalculation "Geometry Analysis 1" (default)
        ct1: CoilTerminal "Input 1" on boundaries 32
      loss1: LossCalculation on all domains
    al2: AmperesLaw "Ampère's Law : Copper" (disabled) on domains 4, 5
    al3: AmperesLaw "Ampère's Law : Air" on domains 2, 3
      loss1: LossCalculation on all domains
    pmc1: PerfectMagneticConductor (disabled) on boundaries 15, 29
    zsp2: ZeroMagneticScalarPotential (disabled) on boundaries 3
    zsp1: ZeroMagneticScalarPotential on points 47
    gfa1: GaugeFixingA "Gauge Fixing for A-field 1" on domains 2-5 | SetPointConstraint = 1
    ark1: ArkkioTorqueCalculation (disabled) on domains 1-9 | TorqueName = 1; ArkkioParameters = user_defined; rout = 200
    fcal1: ForceCalculation "Force Calculation rotor" (disabled) on domains 7-9 | ForceName = 1
    fcal2: ForceCalculation "Force Calculation stator" (disabled) on domains 5 | ForceName = 1
    msp1: MagneticScalarPotential on points 67

Mesh
  mesh1 "Mesh 1"
    size: MeshSizeDefault | hauto = 4
    ftet2: FreeTet "Free Tetrahedral 2" on domains 6
      size1: Size on domains 6 | hauto = 2
    ftet3: FreeTet "Free Tetrahedral 3" on domains 2
      size1: Size on domains 2 | hauto = 3
    ftet4: FreeTet "Free Tetrahedral 4" on domains 3, 4
      size1: Size on domains 3, 4 | hauto = 2
    ftet1: FreeTet "Free Tetrahedral 1" on remaining entities | optcurved = on
    bl1: BndLayer "Boundary Layers 1" on entire geometry
      blp: BndLayerProp "Boundary Layer Properties" on boundaries 17-20, 25, 34, 39-42, 63, 66
        blnlayers = 5
        blstretch = 1.3
        inittype = blhmin
        blhminfact = 0.1
        blhmin = 0.5

Studies
  std1 "Study 1"
    ccc: CoilCurrentCalculation "Coil Geometry Analysis" | solve for = {mf, rmm}
    stat: Stationary
    time: Transient "Time Dependent" (disabled) | tlist = range(0,0.1,2)

Solver configurations
  sol1 "Solution 1" (study std1)
    v1: Variables "Dependent Variables 1"
    s1: Stationary "Stationary Solver 1"
      dDef: Direct
      se1: Segregated
        ss1: SegregatedStep "Rotating Machinery, Magnetic" | segvar = {comp1_rmm_coil1_ccc1_p}; linsolver = dDef
        ss2: SegregatedStep "Spatial Frame Variables" | linsolver = dDef
    su1: StoreSolution "Solution Store 1"
    v2: Variables "Dependent Variables 2" | initmethod = sol; notsolmethod = sol
    s2: Stationary "Stationary Solver 2"
      dDef: Direct
      se1: Segregated
        ss1: SegregatedStep "Rotating Machinery, Magnetic"
          segvar = {comp1_A2, comp1_Vm, comp1_rmm_psi, comp1_rmm_TimeToFrequencyLossesStateVariables}
          linsolver = dDef
        ss2: SegregatedStep "Spatial Frame Variables" | segvar = {comp1_spatial_disp}; linsolver = dDef
    su2: StoreSolution "Solution Store 2"
  sol3 "Solution Store 2" (study std1)
  sol2 "Solution Store 1" (study std1)
  sol4 "Remeshed Solution 1" (study std1)

Datasets
  dset1: Solution | solution = sol1
  dset2: Solution | solution = sol2
  dset3: Solution | solution = sol3
  dset4: Solution | solution = sol4

Plots
  pg1: PlotGroup3D "Magnetic Flux Density Norm (rmm)" | data = dset4
    mslc1: Multislice
      expr = rmm.normB
      multiplanexmethod = coord
      xcoord = rmm.CPx
      multiplaneymethod = coord
      ycoord = rmm.CPy
      multiplanezmethod = coord
      zcoord = rmm.CPz
    strmsl1: StreamlineMultislice
      expr = {rmm.Bx, rmm.By, rmm.Bz}
      multiplanexmethod = coord
      xcoord = rmm.CPx
      multiplaneymethod = coord
      ycoord = rmm.CPy
      multiplanezmethod = coord
      zcoord = rmm.CPz
      udist = 0.02
      col1: Color "Color Expression 1" | expr = rmm.normB
      filt1: Filter | expr = !isScalingSystemDomain
    arwv1: ArrowVolume
      data = dset4
      expr = {rmm.Bx, rmm.By, rmm.Bz}
      maxpointcount = 10000
      xnumber = 15
      ynumber = 15
      znumber = 15
      arrowlength = logarithmic
  pg2: PlotGroup3D "Moving Mesh" | data = dset4
    mesh1: Mesh | data = dset4; meshdomain = volume; qualmeasure = custom; qualexpr = comp1.spatial.relVol
      sel1: MeshSelection "Selection 1" on domains 1-6
      def1: Deform "Deformation 1" | expr = {spatial.dx, spatial.dy, spatial.dz}
  pg3: PlotGroup3D "3D Plot Group 3" | data = dset4
    vol1: Volume | expr = rmm.normJ; unit = A/mm^2
      sel1: Selection on domains 4, 5
      def1: Deform "Deformation 1"
        expr = {spatial.dx, spatial.dy, spatial.dz}
        descr = Spatial mesh displacement (material and geometry frames)
    arwv1: ArrowVolume | expr = {rmm.Bx, rmm.By, rmm.Bz}; maxpointcount = 10000
      sel1: Selection on domains 1, 2
  pg5: PlotGroup3D "Magnetic Flux Density Norm (rmm) 1" | data = dset4
    mslc1: Multislice
      expr = rmm.normB
      multiplanexmethod = coord
      xcoord = rmm.CPx
      multiplaneymethod = coord
      ycoord = rmm.CPy
      multiplanezmethod = coord
      zcoord = rmm.CPz
    strmsl1: StreamlineMultislice
      expr = {rmm.Bx, rmm.By, rmm.Bz}
      multiplanexmethod = coord
      xcoord = rmm.CPx
      multiplaneymethod = coord
      ycoord = rmm.CPy
      multiplanezmethod = coord
      zcoord = rmm.CPz
      udist = 0.02
      col1: Color "Color Expression 1" | expr = rmm.normB
      filt1: Filter | expr = !isScalingSystemDomain
  pg6: PlotGroup3D "Moving Mesh 1" | data = dset4
    mesh1: Mesh | data = dset4; meshdomain = volume; qualmeasure = volcircum; qualexpr = comp1.spatial.relVol
      sel1: MeshSelection "Selection 1" on domains 4, 5, 7-9
      def1: Deform "Deformation 1"
        expr = {spatial.dx, spatial.dy, spatial.dz}
        descr = Spatial mesh displacement (material and geometry frames)
  pg7: PlotGroup3D "Magnetic Flux Density Norm (rmm) 2" | data = dset1
    mslc1: Multislice
      expr = rmm.normB
      multiplanexmethod = coord
      xcoord = rmm.CPx
      multiplaneymethod = coord
      ycoord = rmm.CPy
      multiplanezmethod = coord
      zcoord = rmm.CPz
    strmsl1: StreamlineMultislice
      expr = {rmm.Bx, rmm.By, rmm.Bz}
      multiplanexmethod = coord
      xcoord = rmm.CPx
      multiplaneymethod = coord
      ycoord = rmm.CPy
      multiplanezmethod = coord
      zcoord = rmm.CPz
      udist = 0.02
      col1: Color "Color Expression 1" | expr = rmm.normB
      filt1: Filter | expr = !isScalingSystemDomain
  pg8: PlotGroup3D "Moving Mesh 2" | data = dset1
    mesh1: Mesh | meshdomain = volume; qualmeasure = custom; qualexpr = comp1.spatial.relVol
      sel1: MeshSelection "Selection 1" on domains 2-9

Exports
  anim1: Animation | giffilename = C:\Users\Powerlab\Desktop\02-02-2026\final.gif; size = hd
  anim2: Animation | target = player; framesel = all; maxframes = 31; frametime = 0.2