// COMSOL Multiphysics 6.2.0.339 model "coil v1.mph"
// Outline of the model tree

Parameters
  f = 0.20 [Hz]
  e = 10 [mm]
  rad = 35 [mm]
  t = 0[s]  // Set the time t to zero for the stationary study

Variables
  var1 "Variables 1"
    u = e*sin(2*pi*f*t)
    w = e*cos(2*pi*f*t) - e

Pairs
  ap1: Identity "Identity Boundary Pair 1a" | source: boundaries 6-11; destination: boundaries 33-36, 69, 72

Common definitions
  rot1: RotatingDomain on domains 5-14 | rotationType = rotationalVelocity; angularVelocity = pi/4
  pres1: PrescribedDeformation on domains 3, 4 | prescribedDeformation = {u, w, 0}
  free1: DeformingDomain on domains 2 | smoothingType = hyperelastic
  disp1: PrescribedMeshDisplacement on boundaries 18-25, 27-30 | prescribedMeshDisplacement = {u, w, 0}
  fix1: FixedBoundary on boundaries 13-16, 26, 31

Geometry
  geom1 "Geometry 1" (3D, length unit mm)
    cyl2: Cylinder "stator" | pos = {0, e, 0}; r = 80; h = 10
    cyl3: Cylinder | pos = {0, e, 0}; r = 40; h = 10
    dif1: Difference | input = cyl2; input2 = cyl3
    wp1: WorkPlane
      planetype = vertices
      vertex1 = dif1(1) points 2
      vertex2 = dif1(1) points 1
      vertex3 = dif1(1) points 16
      unite = on
    pard1: PartitionDomains | domain = dif1(1) domains 1; workplane = wp1
    cyl4: Cylinder | pos = {0, 0, -5}; r = 140; h = 20
    uni2: Union | input = cyl4, pard1
    cyl1: Cylinder "rotor" | pos = {0, 0, 40}; r = 90; h = 10
    blk2: Block "magnet" | pos = {50, 0, 38}; base = center; size = {40, 20, 4}
    rot1: Rotate "magnets" | input = blk2; rot = range(0,45,360)
    cyl5: Cylinder | pos = {0, 0, 30}; r = 120; h = 30
    uni1: Union | input = cyl1, cyl5, rot1
    blk1: Block | base = center; size = {350, 350, 350}
    dif2: Difference | input = blk1; input2 = uni1; keepsubtract = on
    fin: Finalize "Form Assembly" | action = assembly
  autodeform1 "Deformed Configuration 1" (3D, length unit mm)
    frommesh1: FromMesh "Deformed Configuration 1" | solution = sol1; t = 1

Materials
  mat1: Common "Soft Iron (Without Losses)" on domains 6
    def "Basic"
      electricconductivity = 0[S/m]
      relpermittivity = 1
    BHCurve
      normB = BH(normHin)
      normH = BH_inv(normBin)
      Wpm = BH_prim(normHin)
      normHin = sqrt(H1^2+H2^2+H3^2+eps)
      DESCR_PREFIX:normHin = Magnetic field norm
      normBin = sqrt(B1^2+B2^2+B3^2+eps)
      DESCR_PREFIX:normBin = Magnetic flux density norm
      BH: Interpolation
        table = 
          {0, 0}
          {663.146, 1}
          {1067.5, 1.1}
          {1705.23, 1.2}
          {2463.11, 1.3}
          {3841.67, 1.4}
          {5425.74, 1.5}
          {7957.75, 1.6}
          {12298.3, 1.7}
          {20462.8, 1.8}
          {32169.6, 1.9}
          {61213.4, 2}
          {111408, 2.1}
          {188487.757, 2.2}
          {267930.364, 2.3}
          {347507.836, 2.4}
        extrap = linear
        fununit = T
        argunit = A/m
        defineinv = on
        defineprimfun = on
    EffectiveBHCurve
      normBeff = BHeff(normHeffin)
      normHeff = BHeff_inv(normBeffin)
      normHeffin = sqrt(realdot(H1,H1)+realdot(H2,H2)+realdot(H3,H3)+eps)
      DESCR_PREFIX:normHeffin = Effective magnetic field norm
      normBeffin = sqrt(realdot(B1,B1)+realdot(B2,B2)+realdot(B3,B3)+eps)
      DESCR_PREFIX:normBeffin = Effective magnetic flux density norm
      BHeff: Interpolation
        table = 
          {0, 0}
          {663.146, 1.00000005169}
          {1067.5, 1.49364951241}
          {1705.23, 1.94153284613}
          {2463.11, 2.25776566937}
          {3841.67, 2.60998064243}
          {5425.74, 2.86644520908}
          {7957.75, 3.14414380972}
          {12298.3, 3.44853805165}
          {20462.8, 3.78167119737}
          {32169.6, 4.05834559011}
          {61213.4, 4.42064655295}
          {111408, 4.72127408955}
          {188487.757, 4.97214814072}
          {267930.364, 5.14551086086}
          {347507.836, 5.24551086143}
        extrap = linear
        fununit = T
        argunit = A/m
        defineinv = on
    RemanentFluxDensity
      murec = 2000
  mat2: Common "N52 (Sintered NdFeB)" on domains 7-14
    def "Basic"
      electricconductivity = 1/1.4[uohm*m]
      relpermittivity = 1
    RemanentFluxDensity
      murec = 1.05
      normBr = 1.44[T]
  mat3: Common "Copper" on domains 3, 4
    def "Basic"
      relpermeability = 1
      electricconductivity = 5.998e7[S/m]
      thermalexpansioncoefficient = 17e-6[1/K]
      heatcapacity = 385[J/(kg*K)]
      relpermittivity = 1
      density = 8960[kg/m^3]
      thermalconductivity = 400[W/(m*K)]
    Enu "Young's modulus and Poisson's ratio"
      E = 110[GPa]
      nu = 0.35
    linzRes "Linearized resistivity"
      rho0 = 1.72e-8[ohm*m]
      alpha = 0.0039[1/K]
      Tref = 298[K]
  mat4: Common "Air" on domains 1, 2, 5
    def "Basic"
      thermalexpansioncoefficient = alpha_p(pA,T)
      molarmass = 0.02897[kg/mol]
      bulkviscosity = muB(T)
      relpermeability = 1
      relpermittivity = 1
      dynamicviscosity = eta(T)
      ratioofspecificheat = 1.4
      electricconductivity = 1[S/m]
      heatcapacity = Cp(T)
      density = rho(pA,T)
      thermalconductivity = k(T)
      soundspeed = cs(T)
      eta: Piecewise | arg = T; pieces = {200.0, 1600.0, -8.38278E-7+8.35717342E-8*T^1-7.69429583E-11*T^2+4.6437266E-14*T^3-1.06585607E-17*T^4}; argunit = K; fununit = Pa*s
      Cp: Piecewise | arg = T; pieces = {200.0, 1600.0, 1047.63657-0.372589265*T^1+9.45304214E-4*T^2-6.02409443E-7*T^3+1.2858961E-10*T^4}; argunit = K; fununit = J/(kg*K)
      rho: Analytic | expr = pA*0.02897/R_const[K*mol/J]/T; args = {pA, T}; fununit = kg/m^3; argunit = {Pa, K}
      k: Piecewise | arg = T; pieces = {200.0, 1600.0, -0.00227583562+1.15480022E-4*T^1-7.90252856E-8*T^2+4.11702505E-11*T^3-7.43864331E-15*T^4}; argunit = K; fununit = W/(m*K)
      cs: Analytic | expr = sqrt(1.4*R_const[K*mol/J]/0.02897*T); args = T; fununit = m/s; argunit = K
      an1: Analytic | funcname = alpha_p; expr = -1/rho(pA,T)*d(rho(pA,T),T); args = {pA, T}; fununit = 1/K; argunit = {Pa, K}
      an2: Analytic "Analytic 2a" | funcname = muB; expr = 0.6*eta(T); args = T; fununit = Pa*s; argunit = K
    RefractiveIndex
      n = 1
      ki = 0
    NonlinearModel
      BA = def.gamma-1
    idealGas
      Rs = R_const/Mn
      heatcapacity = Cp(T)
      ratioofspecificheat = 1.4
      molarmass = 0.02897[kg/mol]
      Cp: Piecewise | arg = T; pieces = {200.0, 1600.0, 1047.63657-0.372589265*T^1+9.45304214E-4*T^2-6.02409443E-7*T^3+1.2858961E-10*T^4}; argunit = K; fununit = J/(kg*K)

Physics
  mf: InductionCurrents "Magnetic Fields" (disabled) on all domains
    dependent variable A = {Ax, Ay, Az}
    fsp1: FreeSpace (default)
    mi1: MagneticInsulation (default)
    init1: init "Initial Values 1" (default)
    mag1: Magnet on domains 6-14 | DirectionMethod = UserDefined; directionInput = {0, 0, 1}
    coil1: Coil on no domains
      ConductorModel = Single
      CoilExcitation = Voltage
      CoilType = Numeric
      VCoil = 1[V]
      N = 5
      ConstitutiveRelationBH = RelativePermeability
      ccc1: CoilCurrentCalculation "Geometry Analysis 1" (default)
        ct1: CoilTerminal "Input 1" on no boundaries
    gfa1: GaugeFixingA "Gauge Fixing for A-field 1" on all domains | SetPointConstraint = 1
  rmm: RotatingMachineryMagnetic on all domains
    dependent variable A2 = {A2x, A2y, A2z}
    ShapeProperty.order_magneticvectorpotential = 1
    ShapeProperty.order_magneticscalarpotential = 1
    etf1: ElectricFieldTransformation (default)
    al1: AmperesLaw "Ampère's Law 1" (default)
    mxb1: MixedFormulationBoundary (default)
    mi1: MagneticInsulation (default)
    init1: init "Initial Values 1" (default)
    dcont1: Continuity (default) | constraintOptions = weakConstraints
    ncmag1: NonconductingMagnet on selection geom1_rot1_dom | PatternType = CircularPattern; PeriodicType = Alternating
      north1: North on boundaries 81
      south1: South on boundaries 82
    mfc1: MagneticFluxConservation on domains 1, 5, 6
    coil1: Coil on domains 3, 4
      ConductorModel = Multi
      CoilExcitation = Voltage
      CoilType = Numeric
      VCoil = 1[V]
      N = 5
      AreaFrom = UserDefined
      FillingFactor = 0.3
      ccc1: CoilCurrentCalculation "Geometry Analysis 1" (default)
        ct1: CoilTerminal "Input 1" on boundaries 17
    gfa1: GaugeFixingA "Gauge Fixing for A-field 1" on domains 2-4 | SetPointConstraint = 1
    zsp1: ZeroMagneticScalarPotential (disabled) on no points
    zsp2: ZeroMagneticScalarPotential (disabled) on edges 3
    zsp3: ZeroMagneticScalarPotential on boundaries 3
    ark1: ArkkioTorqueCalculation on all domains

Mesh
  mesh1 "Mesh 1"
    size: MeshSizeDefault | hmax = 19.3; hmin = 1.4; hcurve = 0.4; hnarrow = 0.7; hgrad = 1.4; hauto = 3
    ftri1: FreeTri "Free Triangular 1" on boundaries 6-11
      size1: Size on boundaries 6-11 | hmax = 24; custom = on
    ftri2: FreeTri "Free Triangular 2" on boundaries 33-36, 69, 72
      size1: Size on boundaries 33-36, 69, 72 | hmax = 8; custom = on
    bl1: BndLayer "Boundary Layers 1" on domains 6-14
      blp: BndLayerProp "Boundary Layer Properties" on no boundaries | blnlayers = 4; inittype = blhmin
    ftet1: FreeTet "Free Tetrahedral 1" on remaining entities
  mesh2 "Mesh 2"
    size: MeshSizeDefault | hmax = 35; hmin = 6.3; hcurve = 0.6; hnarrow = 0.5; hgrad = 1.5
    ref1: Reference | sequence = mesh1

Studies
  std2 "Study 2"
    ccc: CoilCurrentCalculation "Coil Geometry Analysis" | CoilName = 1
    stat: Stationary | solve for = {mf, rmm}
    time: Transient "Time Dependent" | tlist = range(0,0.1,1)

Solver configurations
  sol1 "Solution 1" (study std2)
    v1: Variables "Dependent Variables 1"
    s1: Stationary "Stationary Solver 1"
      dDef: Direct
      fcDef: FullyCoupled
    su1: StoreSolution "Solution Store 1"
    v2: Variables "Dependent Variables 2" | initmethod = sol; notsolmethod = sol
    s2: Stationary "Stationary Solver 2"
      dDef: Direct
      fc1: FullyCoupled | linsolver = dDef
    su2: StoreSolution "Solution Store 2"
    v3: Variables "Dependent Variables 3" | initmethod = sol; notsolmethod = sol
    t1: Time "Time-Dependent Solver 1" | tlist = range(0,0.1,1); tout = tsteps; estrat = exclude
      dDef: Direct
      fc1: FullyCoupled | linsolver = dDef; dtech = auto
      ar1: AutoRemesh "Automatic Remeshing 1" | stopcondtype = distortion; consistentremesh = bweuler
  sol3 "Solution Store 2" (study std2)
  sol2 "Solution Store 1" (study std2)
  sol4 "Remeshed Solution 1" (study std2)

Datasets
  dset1: Solution | solution = sol1
  dset2: Solution | solution = sol2
  dset3: Solution | solution = sol3
  dset4: Solution | solution = sol4

Plots
  pg1: PlotGroup3D "Magnetic Flux Density Norm (rmm)" | data = dset4
    mslc1: Multislice
      expr = rmm.normB
      multiplanexmethod = coord
      xcoord = rmm.CPx
      multiplaneymethod = coord
      ycoord = rmm.CPy
      multiplanezmethod = coord
      zcoord = rmm.CPz
      sel1: Selection on all domains
    strmsl1: StreamlineMultislice
      expr = {rmm.Bx, rmm.By, rmm.Bz}
      multiplanexmethod = coord
      xcoord = rmm.CPx
      multiplaneymethod = coord
      ycoord = rmm.CPy
      multiplanezmethod = coord
      zcoord = rmm.CPz
      udist = 0.02
      col1: Color "Color Expression 1" | expr = rmm.normB
      filt1: Filter | expr = !isScalingSystemDomain
  pg2: PlotGroup3D "3D Plot Group 2" | data = dset1
    vol1: Volume | expr = rmm.VCoil_1; descr = Coil voltage
      sel1: Selection on domains 3, 4
  pg3: PlotGroup3D "3D Plot Group 3" | data = dset4
    vol1: Volume | expr = rmm.normJ; descr = Current density norm
      sel1: Selection on domains 3, 4
  pg4: PlotGroup3D "Magnetic Flux Density Norm (rmm) 1" | data = dset4
    mslc1: Multislice
      expr = rmm.normB
      multiplanexmethod = coord
      xcoord = rmm.CPx
      multiplaneymethod = coord
      ycoord = rmm.CPy
      multiplanezmethod = coord
      zcoord = rmm.CPz
    strmsl1: StreamlineMultislice
      expr = {rmm.Bx, rmm.By, rmm.Bz}
      multiplanexmethod = coord
      xcoord = rmm.CPx
      multiplaneymethod = coord
      ycoord = rmm.CPy
      multiplanezmethod = coord
      zcoord = rmm.CPz
      udist = 0.02
      col1: Color "Color Expression 1" | expr = rmm.normB
      filt1: Filter | expr = !isScalingSystemDomain
  pg5: PlotGroup3D "Moving Mesh" | data = dset4
    mesh1: Mesh | meshdomain = volume; qualmeasure = custom; qualexpr = comp1.spatial.relVol
      sel1: MeshSelection "Selection 1" on domains 2-14
  pg6: PlotGroup1D "1D Plot Group 6" | data = dset1
    lngr1: LineGraph on edges 32, 33, 46, 55 | expr = rmm.normB; descr = Magnetic flux density norm
  pg7: PlotGroup1D "1D Plot Group 7" | data = dset1
    lngr1: LineGraph on edges 32, 33, 46, 55 | expr = rmm.normJ; descr = Current density norm