// COMSOL Multiphysics 6.2.0.339 model "rotating_machinery_3d_tutorial.mph"
// Rotating Machinery 3D Tutorial
// The circular motion of a cylindrical homogeneous copper rotor in the magnetic field from a stationary permanent magnet generates induced eddy currents in the rotor. The magnetic field penetration and eddy current distribution is limited by the velocity skin effect. The example is a general introduction to using the rotating machinery interface in 3D.
// Outline of the model tree

Parameters
  R1 = 1[cm]  // Geometry external radius
  R2 = 6[mm]  // Positioning of sliding interface
  R3 = 5[mm]  // Rotating object radius
  H1 = 5[mm]  // Height of magnet and rotating disk
  omega = 3000[rpm]  // Rotational velocity

Selections
  sel1: Explicit "src" on boundaries 11, 12, 14, 15
  sel2: Explicit "dst" on boundaries 17, 18, 28, 33
  sel3: Explicit "Rotating disk" on domains 4, 5

Pairs
  ap1: Identity "Identity Boundary Pair 1" | source: boundaries 11, 12, 14, 15; destination: boundaries 17, 18, 28, 33

Common definitions
  rot1: RotatingDomain on domains 3-5 | rotationType = rotationalVelocity; angularVelocity = omega

Geometry
  geom1 "Geometry 1" (3D, length unit m)
    cyl1: Cylinder | pos = {0, 0, -1.5*H1}; r = R1; h = 3*H1
    cyl2: Cylinder | pos = {0, 0, -1.5*H1}; r = R2; h = 3*H1
    cyl3: Cylinder | pos = {0, 0, -1.5*H1}; r = R2; h = 3*H1
    dif1: Difference | input = cyl1; input2 = cyl3
    cyl4: Cylinder | pos = {0, 0, -H1/2}; layername = Layer 1; layer = H1/2; layerbottom = on; r = R3; h = H1
    uni1: Union | input = cyl2, cyl4
    wp1: WorkPlane | quickz = -H1/2; unite = on
      r1: Rectangle | pos = {-R1+(R1-R2)/2, -(R1-R2)/12}; size = {(R1-R2)/3, (R1-R2)/6}
    ext1: Extrude | workplane = wp1; input = wp1; distance = H1
    uni2: Union | input = dif1, ext1
    fin: Finalize "Form Assembly" | action = assembly

Materials
  mat1: Common "Air" on all domains
    def "Basic"
      thermalexpansioncoefficient = alpha_p(pA,T)
      molarmass = 0.02897[kg/mol]
      bulkviscosity = muB(T)
      relpermeability = 1
      relpermittivity = 1
      dynamicviscosity = eta(T)
      ratioofspecificheat = 1.4
      electricconductivity = 0[S/m]
      heatcapacity = Cp(T)
      density = rho(pA,T)
      thermalconductivity = k(T)
      soundspeed = cs(T)
      eta: Piecewise | arg = T; pieces = {200.0, 1600.0, -8.38278E-7+8.35717342E-8*T^1-7.69429583E-11*T^2+4.6437266E-14*T^3-1.06585607E-17*T^4}; argunit = K; fununit = Pa*s
      Cp: Piecewise | arg = T; pieces = {200.0, 1600.0, 1047.63657-0.372589265*T^1+9.45304214E-4*T^2-6.02409443E-7*T^3+1.2858961E-10*T^4}; argunit = K; fununit = J/(kg*K)
      rho: Analytic | expr = pA*0.02897/R_const[K*mol/J]/T; args = {pA, T}; fununit = kg/m^3; argunit = {Pa, K}
      k: Piecewise | arg = T; pieces = {200.0, 1600.0, -0.00227583562+1.15480022E-4*T^1-7.90252856E-8*T^2+4.11702505E-11*T^3-7.43864331E-15*T^4}; argunit = K; fununit = W/(m*K)
      cs: Analytic | expr = sqrt(1.4*R_const[K*mol/J]/0.02897*T); args = T; fununit = m/s; argunit = K
      an1: Analytic | funcname = alpha_p; expr = -1/rho(pA,T)*d(rho(pA,T),T); args = {pA, T}; fununit = 1/K; argunit = {Pa, K}
      an2: Analytic "Analytic 2a" | funcname = muB; expr = 0.6*eta(T); args = T; fununit = Pa*s; argunit = K
    RefractiveIndex
      n = 1
      ki = 0
    NonlinearModel
      BA = def.gamma-1
    idealGas
      Rs = R_const/Mn
      heatcapacity = Cp(T)
      ratioofspecificheat = 1.4
      molarmass = 0.02897
      Cp: Piecewise | arg = T; pieces = {200.0, 1600.0, 1047.63657-0.372589265*T^1+9.45304214E-4*T^2-6.02409443E-7*T^3+1.2858961E-10*T^4}; argunit = K; fununit = J/(kg*K)
  mat2: Common "Copper" on selection sel3
    def "Basic"
      relpermeability = 1
      electricconductivity = 5.998e7[S/m]
      heatcapacity = 385[J/(kg*K)]
      relpermittivity = 1
      emissivity = 0.5
      density = 8940[kg/m^3]
      thermalconductivity = 400[W/(m*K)]
    Enu "Young's modulus and Poisson's ratio"
      E = 126e9[Pa]
      nu = 0.34
    linzRes "Linearized resistivity"
      rho0 = 1.667e-8[ohm*m]
      alpha = 3.862e-3[1/K]
      Tref = 293.15[K]
  mat3: Common "N35 (Sintered NdFeB)" on domains 2
    def "Basic"
      electricconductivity = 1/1.4[uohm*m]
      relpermittivity = 1
    RemanentFluxDensity
      murec = 1.05
      normBr = 1.21[T]

Physics
  rmm: RotatingMachineryMagnetic on all domains
    dependent variable A = {Ax, Ay, Az}
    ShapeProperty.order_magneticvectorpotential = 1
    ShapeProperty.order_magneticscalarpotential = 1
    etf1: ElectricFieldTransformation (default)
    al1: AmperesLaw "Ampère's Law 1" (default)
    mxb1: MixedFormulationBoundary (default)
    mi1: MagneticInsulation (default)
    init1: init "Initial Values 1" (default)
    dcont1: Continuity (default)
    mfc1: MagneticFluxConservation "Air, Formulation for Nonconducting Domain" on domains 1, 3
    ncmag1: NonconductingMagnet on domains 2
      north1: North on boundaries 10
      south1: South on boundaries 5
    gfa1: GaugeFixingA "Gauge Fixing for A-field 1" on selection sel3 | SetPointConstraint = 1
    cont1: Continuity "Continuity 1a" on all boundaries | constraintOptions = weakConstraints; pairs = ap1
    zsp1: ZeroMagneticScalarPotential on points 1
    ecd1: ExternalCurrentDensity on selection sel3 | Je = {ec.Jx-rmm.Jix, ec.Jy-rmm.Jiy, ec.Jz-rmm.Jiz}
    pcond1: PassiveConductor on selection sel3
  ec: ConductiveMedia "Electric Currents" on selection sel3
    dependent variable V
    ShapeProperty.order_electricpotential = 1
    cucn1: CurrentConservation (default) | materialType = solid
    ein1: ElectricInsulation (default)
    init1: init "Initial Values 1" (default)
    dcont1: Continuity (default)
    ecd1: ExternalCurrentDensity on selection sel3 | Je = {rmm.Jix, rmm.Jiy, rmm.Jiz}
    ein2: ElectricInsulation on boundaries 26
    pot1: ElectricPotential on points 27, 29

Mesh
  mesh1 "Mesh 1"
    size: MeshSizeDefault | hmax = 0.002; hmin = 3.6E-4; hcurve = 0.6; hnarrow = 0.5; hgrad = 1.5
    ftri1: FreeTri "Free Triangular 1" on selection sel1
      size1: Size on selection sel1 | hmax = 2e-3; custom = on
    ftri2: FreeTri "Free Triangular 2" on selection sel2
      size1: Size on selection sel2 | hmax = 7e-4; custom = on
    ftet1: FreeTet "Free Tetrahedral 1" on domains 1, 2, 4, 5
      size1: Size on boundaries 5-10, 21-27, 29-32 | hmax = 7e-4; custom = on
    bl1: BndLayer "Boundary Layers 1" on selection sel3
      blp: BndLayerProp "Boundary Layer Properties" on boundaries 21-27, 29-32
        blnlayers = 2
        blstretch = 1.3
        inittype = blhmin
        blhmin = 7.0E-5
    ftet2: FreeTet "Free Tetrahedral 2" on remaining entities

Studies
  std1 "Solid Copper Disk"
    stat: Stationary | solve for = {rmm}; disabledphysics = {rmm/ecd1, ec, rmm/pcond1}
    time: Transient "Time Dependent"
      tlist = 0 1/omega/2
      solve for = {rmm}
      disabledphysics = {rmm/ecd1, ec, rmm/pcond1}
  std2 "Laminated Copper Disk"
    stat: Stationary | disabledphysics = rmm/pcond1
    time1: Transient "Time Dependent" | tlist = 0 1/omega/2; disabledphysics = rmm/pcond1
  std3 "Laminated Copper Disk with Passive Conductor"
    stat: Stationary | solve for = {rmm}; disabledphysics = rmm/ecd1
    time: Transient "Time Dependent" | tlist = 0 1/omega/2; solve for = {rmm}; disabledphysics = rmm/ecd1

Solver configurations
  sol1 "Solution 1" (study std1)
    v1: Variables "Dependent Variables 1"
    s1: Stationary "Stationary Solver 1"
      dDef: Direct
      fc1: FullyCoupled | linsolver = dDef
    su1: StoreSolution "Solution Store 1"
    v2: Variables "Dependent Variables 2" | initmethod = sol; notsolmethod = sol
    t1: Time "Time-Dependent Solver 1" | tlist = 0 1/omega/2; tout = tsteps; estrat = exclude
      dDef: Direct
      fc1: FullyCoupled | linsolver = dDef; dtech = auto
  sol2 "Solution Store 1" (study std1)
  sol3 "Solution 3" (study std2)
    v1: Variables "Dependent Variables 1"
    s1: Stationary "Stationary Solver 1"
      dDef: Direct
      se1: Segregated
        ss1: SegregatedStep "Electric Currents" | segvar = {comp1_V}; linsolver = d1
        ss2: SegregatedStep "Rotating Machinery, Magnetic"
          segvar = {comp1_A, comp1_Vm, comp1_rmm_psi, comp1_Vm_lm}
          linsolver = dDef
      d1: Direct
    su1: StoreSolution "Solution Store 2"
    v2: Variables "Dependent Variables 2" | initmethod = sol; notsolmethod = sol
    t1: Time "Time-Dependent Solver 1" | tlist = 0 1/omega/2; tout = tsteps; estrat = exclude
      d1: Direct
      fc1: FullyCoupled | dtech = auto
  sol4 "Solution Store 2" (study std2)
  sol5 "Solution 5" (study std3)
    v1: Variables "Dependent Variables 1"
    s1: Stationary "Stationary Solver 1"
      dDef: Direct
      fc1: FullyCoupled | linsolver = dDef
    su1: StoreSolution "Solution Store 3"
    v2: Variables "Dependent Variables 2" | initmethod = sol; notsolmethod = sol
    t1: Time "Time-Dependent Solver 1" | tlist = 0 1/omega/2; tout = tsteps; maxorder = 2; estrat = exclude
      dDef: Direct
      fc1: FullyCoupled | linsolver = dDef; dtech = auto
  sol6 "Solution Store 3" (study std3)

Datasets
  dset1: Solution | solution = sol1
  dset2: Solution | solution = sol2
  dset3: Solution | solution = sol3
  dset4: Solution | solution = sol4
  dset5: Solution | solution = sol5
  dset6: Solution | solution = sol6

Derived values
  int1: IntVolume "Volume Integration 1" on selection sel3 | data = dset1; table = tbl1; expr = rmm.Qh
  int2: IntVolume "Volume Integration 2" on selection sel3 | data = dset3; table = tbl1; expr = rmm.Qh
  int3: IntVolume "Volume Integration 3" on selection sel3 | data = dset5; table = tbl1; expr = rmm.Qh

Tables
  tbl1: Table
    // Volume Integration 1
    Time (s) | Volumetric loss density, electromagnetic (W) | Volumetric loss density, electromagnetic (W) | Volumetric loss density, electromagnetic (W)
    0 | 1.22696e-10 | 1.62239e-10 | 1.61994e-10
    1.002e-05 | 5.39772e-07 | 7.42115e-07 | 5.32642e-07
    2.002e-05 | 1.25155e-06 | 1.25025e-06 | 1.13561e-06
    4.00199e-05 | 2.59143e-06 | 1.87261e-06 | 2.09809e-06
    8.00198e-05 | 3.43155e-06 | 2.31848e-06 | 2.36725e-06
    0.00012002 | 3.94604e-06 | 2.47571e-06 | 2.43804e-06
    0.00020002 | 4.35979e-06 | 2.5348e-06 | 2.51435e-06
    0.000280019 | 4.51227e-06 | 2.52674e-06 | 2.5211e-06
    0.000360019 | 4.56829e-06 | 2.51705e-06 | 2.5184e-06
    0.000520019 | 4.58535e-06 | 2.49185e-06 | 2.49512e-06
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
Plots
  pg1: PlotGroup3D "Magnetic Flux Density Norm (rmm)" | data = dset1
    mslc1: Multislice
      expr = rmm.normB
      multiplanexmethod = coord
      xcoord = rmm.CPx
      multiplaneymethod = coord
      ycoord = rmm.CPy
      multiplanezmethod = coord
      zcoord = rmm.CPz
    strmsl1: StreamlineMultislice
      expr = {rmm.Bx, rmm.By, rmm.Bz}
      multiplanexmethod = coord
      xcoord = rmm.CPx
      multiplaneymethod = coord
      ycoord = rmm.CPy
      multiplanezmethod = coord
      zcoord = rmm.CPz
      udist = 0.02
      col1: Color "Color Expression 1" | expr = rmm.normB
      filt1: Filter | expr = !isScalingSystemDomain
  pg2: PlotGroup3D "Currents and Solid Domain Boundaries Representation" | data = dset1
    surf1: Surface | expr = 1
      sel1: Selection on boundaries 5-10, 23, 29-32
    arwv1: ArrowVolume
      expr = {rmm.Jx, rmm.Jy, rmm.Jz}
      descr = Current density (spatial frame)
      xnumber = 10
      ynumber = 10
      znumber = 10
      arrowlength = logarithmic
      sel1: Selection on selection sel3
      col1: Color "Color Expression 1" | expr = rmm.normJ
  pg3: PlotGroup1D "Losses in the Copper Disk"
    data = none
    title = Losses in the copper disk with and without an insulating layer (W)
    tblp1: Table "Table Graph 1"
      table = tbl1
      legends = {Solid copper disk, Laminated copper disk, Laminated copper disk with Passive Conductor}
  pg4: PlotGroup3D "Magnetic Flux Density Norm (rmm) 1" | data = dset3
    mslc1: Multislice
      expr = rmm.normB
      multiplanexmethod = coord
      xcoord = rmm.CPx
      multiplaneymethod = coord
      ycoord = rmm.CPy
      multiplanezmethod = coord
      zcoord = rmm.CPz
    strmsl1: StreamlineMultislice
      expr = {rmm.Bx, rmm.By, rmm.Bz}
      multiplanexmethod = coord
      xcoord = rmm.CPx
      multiplaneymethod = coord
      ycoord = rmm.CPy
      multiplanezmethod = coord
      zcoord = rmm.CPz
      udist = 0.02
      col1: Color "Color Expression 1" | expr = rmm.normB
      filt1: Filter | expr = !isScalingSystemDomain
  pg5: PlotGroup3D "Electric Potential (ec)" | data = dset3
    vol1: Volume | expr = V
  pg6: PlotGroup3D "Electric Field Norm (ec)" | data = dset3
    mslc1: Multislice
      expr = ec.normE
      multiplanexmethod = coord
      xcoord = ec.CPx
      multiplaneymethod = coord
      ycoord = ec.CPy
      multiplanezmethod = coord
      zcoord = ec.CPz
    strmsl1: StreamlineMultislice
      expr = {ec.Ex, ec.Ey, ec.Ez}
      multiplanexmethod = coord
      xcoord = ec.CPx
      multiplaneymethod = coord
      ycoord = ec.CPy
      multiplanezmethod = coord
      zcoord = ec.CPz
      udist = 0.02
      col1: Color "Color Expression 1" | expr = ec.normE
      filt1: Filter | expr = !isScalingSystemDomain
  pg7: PlotGroup3D "Current Perpendicular to the Insulating Plane" | data = dset3
    vol1: Volume | expr = rmm.Jz; unit = A/mm^2
  pg8: PlotGroup3D "Magnetic Flux Density Norm (rmm) 2" | data = dset5
    mslc1: Multislice
      expr = rmm.normB
      multiplanexmethod = coord
      xcoord = rmm.CPx
      multiplaneymethod = coord
      ycoord = rmm.CPy
      multiplanezmethod = coord
      zcoord = rmm.CPz
    strmsl1: StreamlineMultislice
      expr = {rmm.Bx, rmm.By, rmm.Bz}
      multiplanexmethod = coord
      xcoord = rmm.CPx
      multiplaneymethod = coord
      ycoord = rmm.CPy
      multiplanezmethod = coord
      zcoord = rmm.CPz
      udist = 0.02
      col1: Color "Color Expression 1" | expr = rmm.normB
      filt1: Filter | expr = !isScalingSystemDomain