// COMSOL Multiphysics 6.2.0.339 model "E-Core Design.mph"
// Outline of the model tree

Parameters
  Rp = 100[ohm]  // Primary side resistance
  Ns = 300  // Number of turns in secondary winding
  nu = 50[Hz]  // Frequency of supply voltage

Variables
  var3 "Variables 3"
    Rs = 10[kohm]  // Secondary side resistance
    Np = 300  // Number of turns in primary winding
    Vac = 25[V]  // Supply voltage
  var4 "Variables 4"
    Rs = 100[ohm]  // Secondary side resistance
    Np = 3e5  // Number of turns in primary winding
    Vac = 25[kV]  // Supply voltage

Geometry
  geom1 "Geometry 1" (3D, length unit mm)
    wp1: WorkPlane | quickplane = xz; quicky = 10; unite = on
      r1: Rectangle | pos = {-40, -36}; size = {80, 70}
      r2: Rectangle | pos = {-30, -26}; size = {20, 50}
      r3: Rectangle | pos = {10, -26}; size = {20, 50}
      co1: Compose | input = r1, r2, r3; formula = r1 - r2 - r3
    ext1: Extrude | workplane = wp1; input = wp1; distance = 20
    wp2: WorkPlane | quickz = -23; unite = on
      c1: Circle | r = 16
      c2: Circle | r = 20
      c3: Circle | r = 24
      ls2: LineSegment | vertex1 = c2(1) points 1; vertex2 = c3(1) points 1
      ls1: LineSegment | vertex1 = c1(1) points 1; vertex2 = c2(1) points 1
      ls3: LineSegment | vertex1 = c1(1) points 4; vertex2 = c2(1) points 4
      ls4: LineSegment | vertex1 = ls3(1) points 2; vertex2 = c3(1) points 4
      ls5: LineSegment | vertex1 = c1(1) points 3; vertex2 = c2(1) points 3
      ls6: LineSegment | vertex1 = ls5(1) points 2; vertex2 = c3(1) points 3
      ls7: LineSegment | vertex1 = c1(1) points 2; vertex2 = c2(1) points 2
      ls8: LineSegment | vertex1 = ls7(1) points 2; vertex2 = c3(1) points 2
      co1: Compose | input = c1, c2, c3; formula = c2 + c3 -c1
    ext2: Extrude | workplane = wp2; input = wp2; distance = 46
    blk1: Block | base = center; size = {150, 130, 150}
    sel1: ExplicitSelection "Primary Winding" | selection = ext2(1) domains 3, 4, 6, 7; contributeto = csel2.dom
    sel2: ExplicitSelection "Secondary Winding" | selection = ext2(1) domains 1, 2, 5, 8; contributeto = csel2.dom
    fin: Finalize "Form Union"
    sel3: ExplicitSelection "Object" | selection = fin; selshow = all; contributeto = csel1.dom
    sel4: ExplicitSelection "Boundary" | selection = fin(1) boundaries 7-13, 30, 49-51, 54, 55; contributeto = csel3.dom
    sel5: ExplicitSelection "Edge" | selection = fin(1) edges 9-24, 44-47, 74-81, 89-96; contributeto = csel1.dom
    sel6: ExplicitSelection "Core1" | selection = fin(1) domains 1

Materials
  mat3: Common "Copper" on all domains
    def "Basic"
      relpermeability = 1
      electricconductivity = 5.998e7[S/m]
      thermalexpansioncoefficient = 17e-6[1/K]
      heatcapacity = 385[J/(kg*K)]
      relpermittivity = 1
      density = 8960[kg/m^3]
      thermalconductivity = 400[W/(m*K)]
    Enu "Young's modulus and Poisson's ratio"
      E = 110[GPa]
      nu = 0.35
    linzRes "Linearized resistivity"
      rho0 = 1.72e-8[ohm*m]
      alpha = 0.0039[1/K]
      Tref = 298[K]
  mat5: Common "Soft Iron (Without Losses)" on domains 2
    def "Basic"
      electricconductivity = 0[S/m]
      relpermittivity = 1
      relpermeability = 4000
    BHCurve
      normB = BH(normHin)
      normH = BH_inv(normBin)
      Wpm = BH_prim(normHin)
      normHin = sqrt(H1^2+H2^2+H3^2+eps)
      DESCR_PREFIX:normHin = Magnetic field norm
      normBin = sqrt(B1^2+B2^2+B3^2+eps)
      DESCR_PREFIX:normBin = Magnetic flux density norm
      BH: Interpolation
        table = 
          {0, 0}
          {663.146, 1}
          {1067.5, 1.1}
          {1705.23, 1.2}
          {2463.11, 1.3}
          {3841.67, 1.4}
          {5425.74, 1.5}
          {7957.75, 1.6}
          {12298.3, 1.7}
          {20462.8, 1.8}
          {32169.6, 1.9}
          {61213.4, 2}
          {111408, 2.1}
          {188487.757, 2.2}
          {267930.364, 2.3}
          {347507.836, 2.4}
        extrap = linear
        fununit = T
        argunit = A/m
        defineinv = on
        defineprimfun = on
    EffectiveBHCurve
      normBeff = BHeff(normHeffin)
      normHeff = BHeff_inv(normBeffin)
      normHeffin = sqrt(realdot(H1,H1)+realdot(H2,H2)+realdot(H3,H3)+eps)
      DESCR_PREFIX:normHeffin = Effective magnetic field norm
      normBeffin = sqrt(realdot(B1,B1)+realdot(B2,B2)+realdot(B3,B3)+eps)
      DESCR_PREFIX:normBeffin = Effective magnetic flux density norm
      BHeff: Interpolation
        table = 
          {0, 0}
          {663.146, 1.00000005169}
          {1067.5, 1.49364951241}
          {1705.23, 1.94153284613}
          {2463.11, 2.25776566937}
          {3841.67, 2.60998064243}
          {5425.74, 2.86644520908}
          {7957.75, 3.14414380972}
          {12298.3, 3.44853805165}
          {20462.8, 3.78167119737}
          {32169.6, 4.05834559011}
          {61213.4, 4.42064655295}
          {111408, 4.72127408955}
          {188487.757, 4.97214814072}
          {267930.364, 5.14551086086}
          {347507.836, 5.24551086143}
        extrap = linear
        fununit = T
        argunit = A/m
        defineinv = on

Physics
  mf: InductionCurrents "Magnetic Fields" on all domains
    dependent variable A = {Ax, Ay, Az}
    ShapeProperty.order_magneticvectorpotential = 1
    fsp1: FreeSpace (default)
    mi1: MagneticInsulation (default)
    init1: init "Initial Values 1" (default)
    als2: AmperesLawSolid "Ampère's Law in Solids 2" on domains 2 | ConstitutiveRelationBH = BHCurve
      loss1: LossCalculation on domains 2 | LossModel = Steinmetz
    coil1: Coil on selection geom1_sel1
      ConductorModel = Multi
      CoilExcitation = CircuitCurrent
      CoilType = Numeric
      N = Np
      ConstitutiveRelationJcE = ElectricalConductivity
      materialType = from_mat
      ccc1: CoilCurrentCalculation "Geometry Analysis 1" (default)
        ct1: CoilTerminal "Input 1" on boundaries 35
      loss1: LossCalculation on domains 5, 6, 8, 9
    coil2: Coil on selection geom1_sel2
      ConductorModel = Multi
      CoilExcitation = CircuitCurrent
      CoilType = Numeric
      N = Ns
      ccc1: CoilCurrentCalculation "Geometry Analysis 1" (default)
        ct1: CoilTerminal "Input 1" on boundaries 31
      loss1: LossCalculation on all domains
    gfa1: GaugeFixingA "Gauge Fixing for A-field 1" on all domains | equationForm = Stationary
  cir: Circuit "Electrical Circuit"
    dependent variable voltages
    gnd1: GroundNode
    V1: VoltageSource | Connections = {1, 0}; sourceType = SineSource; value = Vac; freq = nu
    IvsU1: ModelDeviceIV "External I vs. U 1" | V_src = root.comp1.mf.VCoil_1; Connections = {2, 1}
    R1: Resistor | R = Rp; Connections = {0, 2}
    IvsU2: ModelDeviceIV "External I vs. U 2" | V_src = root.comp1.mf.VCoil_2; Connections = {3, 0}
    R2: Resistor | R = Rs; Connections = {0, 3}

Mesh
  mesh1 "Mesh 1"
    size: MeshSizeDefault | hmax = 15; hmin = 2.7; hcurve = 0.6; hnarrow = 0.5; hgrad = 1.5
    ftet3: FreeTet "Free Tetrahedral 1" on entire geometry
      size1: Size on domains 2-10 | hmax = 6; custom = on

Studies
  std1 "Study 1"
    ccc: CoilCurrentCalculation "Coil Geometry Analysis"
      CoilName = 1
      disabledvariables = {var4}
      usesol = on
      notsolmethod = sol
  std2 "Study 2"
    time: Transient "Time Dependent"
      tunit = ms
      tlist = range(0,5e-4,0.05)
      disabledvariables = {var4}
      usesol = on
      notsolmethod = sol
      notstudy = std1
  std3 "Loss Calculation, Case 1."
    emloss: TimeToFrequencyLosses
      fftinputstudy = std2
      fftstarttime = 5.0E-5[s]-((0.02)[ms])
      fftendtime = 5.0E-5
      fftmaxfreq = 6/((0.02)[ms])
      losstunit = ms
      lossstarttime = 0
      disabledvariables = {var4}
  std4 "Loss Calculation, Case 2"
    emloss: TimeToFrequencyLosses
      fftinputstudy = std5
      fftstarttime = 0.05[s]-((0.02)[s])
      fftendtime = 0.05
      fftmaxfreq = 6/((0.02)[s])
      lossstarttime = 0
      disabledvariables = {var3}
  std5 "Study 3, Case 2"
    time: Transient "Time Dependent"
      tlist = range(0,5e-4,0.05)
      disabledvariables = {var3}
      usesol = on
      notsolmethod = sol
      notstudy = std1

Solver configurations
  sol1 "Solution 1" (study std1)
    v1: Variables "Dependent Variables 1"
    s1: Stationary "Stationary Solver 1"
      dDef: Direct
      se1: Segregated | segterm = itertol; segiter = 6
        ss1: SegregatedStep | segvar = {comp1_mf_coil1_ccc1_s, comp1_mf_coil2_ccc1_s}; linsolver = dDef
        ss2: SegregatedStep
          segvar = {comp1_mf_coil1_ccc1_p, comp1_mf_coil1_ccc1_lm, comp1_mf_coil2_ccc1_p, comp1_mf_coil2_ccc1_lm}
          linsolver = dDef
  sol2 "Solution 2" (study std2)
    v1: Variables "Dependent Variables 1" | scalemethod = none
    t1: Time "Time-Dependent Solver 1"
      tlist = range(0,5e-4,0.05)
      tout = tstepsclosest
      tstepsbdf = strict
      estrat = exclude
      fc1: FullyCoupled | linsolver = d1; ntolfact = 0.2; jtech = onevery
      d1: Direct "Suggested Direct Solver () (Merged)" | linsolver = pardiso
  sol3 "Solution 3" (study std3)
    v1: Variables "Dependent Variables 1"
    fft1: FFT "FFT Solver 1"
    su1: StoreSolution "Solution Store 1"
    cms1: CombineSolution "Combine Solutions 1"
      soloper = gensum
      gensumexpression = {comp1_A, comp1.Ax comp1.Ay comp1.Az comp1.AX comp1.AY comp1.AZ comp1.AXg comp1.AYg comp1.AZg comp1.AXm comp1.AYm comp1.AZm, comp1_mf_coil1_ccc1_lm, comp1.mf.coil1.ccc1.lm, comp1_mf_coil1_ccc1_p, comp1.mf.coil1.ccc1.p, comp1_mf_coil1_ccc1_s, comp1.mf.coil1.ccc1.s, comp1_mf_coil2_ccc1_lm, comp1.mf.coil2.ccc1.lm, comp1_mf_coil2_ccc1_p, comp1.mf.coil2.ccc1.p, comp1_mf_coil2_ccc1_s, comp1.mf.coil2.ccc1.s, comp1_mf_fftB, comp1.mf.fftBX comp1.mf.fftBY comp1.mf.fftBZ, comp1_mf_psi, comp1.mf.psi, comp1_mf_QavDoF, comp1.mf.Qloss, comp1_mf_TimeToFrequencyLossesStateVariables, comp1.mf.TimeToFrequencyLossesStateVariables, comp1_currents, comp1.cir.IvsU1_i comp1.cir.IvsU2_i}
  sol4 "Solution Store 1" (study std3)
  sol5 "Solution 5" (study std5)
    v1: Variables "Dependent Variables 1" | scalemethod = none
    t1: Time "Time-Dependent Solver 1"
      tlist = range(0,5e-4,0.05)
      tout = tstepsclosest
      tstepsbdf = strict
      maxstepconstraintbdf = const
      maxstepbdf = 2.5e-4
      estrat = exclude
      fc1: FullyCoupled | linsolver = d1; ntolfact = 0.2; jtech = onevery
      d1: Direct "Suggested Direct Solver () (Merged)" | linsolver = pardiso
  sol6 "Solution 6" (study std4)
    v1: Variables "Dependent Variables 1"
    fft1: FFT "FFT Solver 1"
    su1: StoreSolution "Solution Store 2"
    cms1: CombineSolution "Combine Solutions 1"
      soloper = gensum
      gensumexpression = {comp1_A, comp1.Ax comp1.Ay comp1.Az comp1.AX comp1.AY comp1.AZ comp1.AXg comp1.AYg comp1.AZg comp1.AXm comp1.AYm comp1.AZm, comp1_mf_coil1_ccc1_lm, comp1.mf.coil1.ccc1.lm, comp1_mf_coil1_ccc1_p, comp1.mf.coil1.ccc1.p, comp1_mf_coil1_ccc1_s, comp1.mf.coil1.ccc1.s, comp1_mf_coil2_ccc1_lm, comp1.mf.coil2.ccc1.lm, comp1_mf_coil2_ccc1_p, comp1.mf.coil2.ccc1.p, comp1_mf_coil2_ccc1_s, comp1.mf.coil2.ccc1.s, comp1_mf_fftB, comp1.mf.fftBX comp1.mf.fftBY comp1.mf.fftBZ, comp1_mf_psi, comp1.mf.psi, comp1_mf_QavDoF, comp1.mf.Qloss, comp1_mf_TimeToFrequencyLossesStateVariables, comp1.mf.TimeToFrequencyLossesStateVariables, comp1_currents, comp1.cir.IvsU1_i comp1.cir.IvsU2_i}
  sol7 "Solution Store 2" (study std4)

Datasets
  dset1: Solution | solution = sol1
  dset2: Solution on domains 2-10 | solution = sol2
  dset3: Solution | solution = sol3
  dset4: Solution | solution = sol4
  dset5: Solution | solution = sol5
  dset6: Solution | solution = sol6
  dset7: Solution | solution = sol7

Plots
  pg1: PlotGroup3D "Magnetic Flux Density and Current" | data = dset2
    vol1: Volume | expr = mf.normB
      sel1: Selection on domains 2, 4, 6-10
    arwv1: ArrowVolume | expr = {mf.Jx, mf.Jy, mf.Jz}; descr = Current density; xnumber = 10; ynumber = 10; znumber = 5
      sel1: Selection on selection geom1_sel1
    arwv2: ArrowVolume | expr = {-mf.Jx, -mf.Jy, -mf.Jz}; xnumber = 10; ynumber = 10; znumber = 5
      sel1: Selection on selection geom1_sel2
  pg2: PlotGroup3D "Magnetic Flux Density in the Core" on domains 2 | data = dset2
    slc1: Slice | expr = mf.normB; quickplane = zx; quickynumber = 1
    arwv1: ArrowVolume | expr = {mf.Bx, mf.By, mf.Bz}; xnumber = 10; ynumber = 1; znumber = 10
  pg3: PlotGroup3D "Cycle Averaged Losses in the Core"
    data = dset1
    title = Volumetric loss density, electromagnetic (W/ m<sup>3</sup>): Case 1 (left), Case 2 (right)
    vol1: Volume | data = dset3; expr = mf.Qh
      sel1: Selection on domains 2
    vol2: Volume | data = dset6; expr = mf.Qh
      sel1: Selection on domains 2
      trn1: Translation | trans = {100, -50, 0}